<Lems>

    <!--

        This LEMS file has been automatically generated using PyNeuroML v1.3.15 (libNeuroML v0.6.5)

     -->

    <!-- Specify which component to run -->
    <Target component="iv_IT2_reduced_cell_0_0"/>

    <!-- Include core NeuroML2 ComponentType definitions -->
    <Include file="Cells.xml"/>
    <Include file="Networks.xml"/>
    <Include file="Simulation.xml"/>

    <Include file="IT2_reduced_cell.nml"/>
    <Include file="cadad.channel.nml"/>
    <Include file="can_mig.channel.nml"/>
    <Include file="cat_mig.channel.nml"/>
    <Include file="cal_mig.channel.nml"/>
    <Include file="h_kole.channel.nml"/>
    <Include file="kap_BS.channel.nml"/>
    <Include file="pas.channel.nml"/>
    <Include file="kBK.channel.nml"/>
    <Include file="kdr_BS.channel.nml"/>
    <Include file="kdr_BS_soma.channel.nml"/>
    <Include file="nax_BS.channel.nml"/>
    <Include file="iv_IT2_reduced_cell_0_0.net.nml"/>

    <Simulation id="iv_IT2_reduced_cell_0_0" length="1200.0ms" step="0.05ms" target="network_of_IT2_reduced_cell_0_0" seed="12345">  <!-- Note seed: ensures same random numbers used every run -->
        <Display id="Voltage_display" title="Voltages" timeScale="1ms" xmin="-120.0" xmax="1320.0" ymin="-90" ymax="50">
            <Line id="v_cell0" quantity="population_of_IT2_reduced_cell_0_0[0]/v" scale="1mV" color="#43cb1e" timeScale="1ms"/>
            <Line id="v_cell1" quantity="population_of_IT2_reduced_cell_0_0[1]/v" scale="1mV" color="#b4db35" timeScale="1ms"/>
            <Line id="v_cell2" quantity="population_of_IT2_reduced_cell_0_0[2]/v" scale="1mV" color="#c2481e" timeScale="1ms"/>
            <Line id="v_cell3" quantity="population_of_IT2_reduced_cell_0_0[3]/v" scale="1mV" color="#f4a964" timeScale="1ms"/>
        </Display>

        <OutputFile id="Volts_file" fileName="iv_IT2_reduced_cell_0_0.v.dat">
            <OutputColumn id="v_cell0" quantity="population_of_IT2_reduced_cell_0_0[0]/v"/>
            <OutputColumn id="v_cell1" quantity="population_of_IT2_reduced_cell_0_0[1]/v"/>
            <OutputColumn id="v_cell2" quantity="population_of_IT2_reduced_cell_0_0[2]/v"/>
            <OutputColumn id="v_cell3" quantity="population_of_IT2_reduced_cell_0_0[3]/v"/>
        </OutputFile>

    </Simulation>

</Lems>
