<?xml version="1.0" encoding="ISO-8859-1"?>
<neuroml xmlns="http://www.neuroml.org/schema/neuroml2" xmlns:xsi="http://www.w3.org/2001/XMLSchema-instance" xsi:schemaLocation="http://www.neuroml.org/schema/neuroml2 https://raw.github.com/NeuroML/NeuroML2/development/Schemas/NeuroML2/NeuroML_v2beta4.xsd" id="ih">

    <ionChannel id="ih" conductance="10pS" type="ionChannelHH" species="hcn">

        <gate id="m" type="gateHHrates" instances="1">
            <forwardRate type="HHExpLinearRate" rate="0.0279264094767per_ms" scale="-7.63692206734mV" midpoint="-115.040811905mV"/>
            <reverseRate type="HHExpRate" rate="10.0615811962per_ms" scale="37.2740194128mV" midpoint="0mV"/>
        </gate>

    </ionChannel>

</neuroml>
