<neuroml xmlns="http://www.neuroml.org/schema/neuroml2"  xmlns:xs="http://www.w3.org/2001/XMLSchema" xmlns:xsi="http://www.w3.org/2001/XMLSchema-instance" xsi:schemaLocation="http://www.neuroml.org/schema/neuroml2 https://raw.github.com/NeuroML/NeuroML2/development/Schemas/NeuroML2/NeuroML_v2.3.xsd" id="cell">
    <notes>HH cell</notes>

    <cell id="hh_cell">
        <notes>A single compartment HH cell</notes>
        <morphology id="hh_cell_morph">
            <segment id="0" name="soma">
                <proximal x="0.0" y="0.0" z="0.0" diameter="20"/>
                <distal x="0.0" y="0.0" z="0.0" diameter="20"/>
            </segment>
        </morphology>
        <biophysicalProperties id="hh_b_prop">
            <membraneProperties>

                <spikeThresh value="10mV"/>
                <specificCapacitance value="1.0 uF_per_cm2"/>
                <initMembPotential value="-65mV"/>
            </membraneProperties>
            <intracellularProperties>
                <resistivity value="0.03 kohm_cm"/>
            </intracellularProperties>
        </biophysicalProperties>
    </cell>
</neuroml>
