<Lems>

    <!--

        This LEMS file has been automatically generated using PyNeuroML v1.3.15 (libNeuroML v0.6.5)

     -->

    <!-- Specify which component to run -->
    <Target component="testsim_cal"/>

    <!-- Include core NeuroML2 ComponentType definitions -->
    <Include file="Cells.xml"/>
    <Include file="Networks.xml"/>
    <Include file="Simulation.xml"/>

    <Include file="Test_cal.net.nml"/>
    <Include file="cadad.channel.nml"/>
    <Include file="cal_mig.channel.nml"/>
    <Include file="pas.channel.nml"/>
    <Include file="CaClamp.nml"/>

    <Simulation id="testsim_cal" length="1500.0ms" step="0.01ms" target="testnet" seed="12345">  <!-- Note seed: ensures same random numbers used every run -->
        <Display id="DispPop__testpop" title="Membrane potentials of cells in testpop" timeScale="1ms" xmin="-150.0" xmax="1650.0000000000002" ymin="-90" ymax="50">
            <Line id="testpop[0]: v" quantity="testpop[0]/v" scale="1mV" color="#d54f33" timeScale="1ms"/>
        </Display>

        <OutputFile id="Volts_file__testpop" fileName="testsim_cal.testpop.v.dat">
            <OutputColumn id="v_testpop_0__v" quantity="testpop[0]/v"/>
        </OutputFile>

        <OutputFile id="20250725184403_ca_i_nml_dat" fileName="20250725184403_ca_i_nml.dat">
            <OutputColumn id="testpop_0__biophys_membraneProperties_cal_soma_iDensity" quantity="testpop[0]/biophys/membraneProperties/cal_soma/iDensity"/>
        </OutputFile>

        <OutputFile id="20250725184403_ca_nml_dat" fileName="20250725184403_ca_nml.dat">
            <OutputColumn id="testpop_0__caConc" quantity="testpop[0]/caConc"/>
        </OutputFile>

        <OutputFile id="20250725184403_m_nml_dat" fileName="20250725184403_m_nml.dat">
            <OutputColumn id="testpop_0__biophys_membraneProperties_cal_soma_cal_m_q" quantity="testpop[0]/biophys/membraneProperties/cal_soma/cal/m/q"/>
        </OutputFile>

    </Simulation>

</Lems>
